# bcc iron in a 3d periodic box

clear
units 		metal
atom_style 	spin

dimension 	3
boundary 	p p p

# necessary for the serial algorithm (sametag)
atom_modify 	map array

lattice 	bcc 2.8665
region 		box block 0.0 5.0 0.0 5.0 0.0 5.0
create_box 	1 box
create_atoms 	1 box

# setting mass, mag. moments, and interactions for bcc iron

mass		1 55.845
#set 		group all spin 2.2 1.0 0.0 0.0
#set 		group all spin/random 1906 2.2
#velocity 	all create 100 4928459 rot yes dist gaussian

pair_style 	hybrid/overlay eam/alloy spin/exchange/biquadratic 3.5
pair_coeff 	* * eam/alloy Fe_Mishin2006.eam.alloy Fe
pair_coeff      * * spin/exchange/biquadratic biquadratic 5.0 0.2827 -4.747 0.7810 -0.03619 -2.973 0.5273 offset yes
neighbor 	0.1 bin
neigh_modify 	every 10 check yes delay 20

fix 		1 all precession/spin cubic -0.01 -0.0005 1.0 0.0 0.0 0.0 1.0 0.0 0.0 0.0 1.0
fix_modify 	1 energy yes
fix 		2 all langevin/spin 0.0 0.01 21

fix 		3 all nve/spin lattice frozen
timestep	0.0001

# compute and output options

compute 	out_mag    all spin
compute 	out_pe     all pe
compute 	out_ke     all ke
compute 	out_temp   all temp

variable 	magx      equal c_out_mag[1]
variable 	magy      equal c_out_mag[2]
variable 	magz      equal c_out_mag[3]
variable 	magnorm   equal c_out_mag[4]
variable 	emag      equal c_out_mag[5]
variable 	tmag      equal c_out_mag[6]

thermo_style    custom step time v_magx v_magy v_magz v_magnorm v_tmag v_emag pe etotal
thermo          500

compute 	outsp all property/atom spx spy spz sp fmx fmy fmz
dump 		1 all custom 1000 dump_iron.lammpstrj type x y z c_outsp[1] c_outsp[2] c_outsp[3]

run 		1
# min_style 	spin
# min_modify	alpha_damp 1.0 discrete_factor 10
# minimize 	1.0e-16 1.0e-16 10000 10000
